<?xml version="1.0"?>
<!-- Generated by Aero-Matic v 1.1
	Manufacturer	: MT-Propeller
	Model		: MTV-5-1-D-C-F-R(A)/CFR210-56

     Inputs:
                horsepower: 450
                     pitch: variable
            max engine rpm: 2333
        prop diameter (ft): 6.8901

     Outputs:
              max prop rpm: 2723.18
                gear ratio:    0.86
                       Cp0: 0.071690
                       Ct0: 0.167038
       static thrust (lbs): 1844.08
-->

<propeller name="propeller_MTV-5-1-D-C-F-R(A)">

  <ixx> 5.13 </ixx>
  <diameter unit="IN"> 82.7 </diameter>
  <numblades> 5 </numblades>
  <gearratio> 0.89 </gearratio><!-- 0.89 -->
  <minpitch> 8 </minpitch>
  <maxpitch> 79 </maxpitch>
  <minrpm> 1850 </minrpm>
  <maxrpm> 2250 </maxrpm>
  <constspeed> 1 </constspeed>
  <reversepitch> -15 </reversepitch>
  <p_factor> 6.53 </p_factor>
  <ct_factor> 4.0 </ct_factor>
  <cp_factor> 0.75 </cp_factor>


 <!-- thrust coefficient as a function of advance ratio and blade angle -->
  <table name="C_THRUST" type="internal">
      <tableData>
	      <!--
                -10        0         15        25        35        45        55        65       90
      -0.2      -0.0816    0.0460    0.1673    0.2049    0.2258    0.2383    0.2196    0.1882   0.0000
       0.0      -0.1213    0.0000    0.1673    0.2049    0.2258    0.2405    0.2248    0.1882   0.0000
       0.2      -0.1360   -0.0418    0.1443    0.2007    0.2226    0.2405    0.2248    0.1882   0.0000
       0.4      -0.1360   -0.0972    0.1087    0.1987    0.2184    0.2383    0.2248    0.1882   0.0000
       0.6      -0.1360   -0.1360    0.0575    0.1788    0.2091    0.2321    0.2216    0.1882   0.0000
       0.8      -0.1360   -0.1360    0.0032    0.1338    0.2029    0.2238    0.2216    0.1882   0.0000
       1.0      -0.1360   -0.1360   -0.0544    0.0816    0.1945    0.2122    0.2196    0.1882   0.0000
       1.2      -0.1360   -0.1360   -0.1119    0.0251    0.1599    0.2049    0.2196    0.1882   0.0000
       1.4      -0.1360   -0.1360   -0.1360   -0.0366    0.1151    0.2017    0.2154    0.1882   0.0000
       1.6      -0.1360   -0.1360   -0.1360   -0.0930    0.0627    0.1945    0.2112    0.1882   0.0000
       1.8      -0.1360   -0.1360   -0.1360   -0.1360    0.0105    0.1673    0.2049    0.1882   0.0000
       2.0      -0.1360   -0.1360   -0.1360   -0.1360   -0.0418    0.1306    0.2040    0.1882   0.0000
       2.2      -0.1360   -0.1360   -0.1360   -0.1360   -0.0942    0.0942    0.2007    0.1882   0.0000
       2.4      -0.1360   -0.1360   -0.1360   -0.1360   -0.1360    0.0502    0.1639    0.1882   0.0000
       2.6      -0.1360   -0.1360   -0.1360   -0.1360   -0.1360    0.0064    0.1037    0.1673   0.0000
       2.8      -0.1360   -0.1360   -0.1360   -0.1360   -0.1360   -0.0376    0.0679    0.1360   0.0000
       3.0      -0.1360   -0.1360   -0.1360   -0.1360   -0.1360   -0.0816    0.0356    0.1045   0.0000
       3.2      -0.1360   -0.1360   -0.1360   -0.1360   -0.1360   -0.1254    0.0032    0.0733   0.0000
       3.4      -0.1360   -0.1360   -0.1360   -0.1360   -0.1360   -0.1360   -0.0293    0.0418   0.0000
       3.6      -0.1360   -0.1360   -0.1360   -0.1360   -0.1360   -0.1360   -0.0617    0.0105   0.0000
       3.8      -0.1360   -0.1360   -0.1360   -0.1360   -0.1360   -0.1360   -0.0942   -0.0209   0.0000
       4.0      -0.1360   -0.1360   -0.1360   -0.1360   -0.1360   -0.1360   -0.1264   -0.0523   0.0000
       6.0      -0.1360   -0.1360   -0.1360   -0.1360   -0.1360   -0.1360   -0.1360   -0.1360   0.0000
       -->
	       <!-- -->
	-16	0	8	16	24	32	40	48	56	64	72	80
-0.2	0.0000	0.0199	0.0395	0.0546	0.0849	0.1157	0.1467	0.1778	0.2090	0.2402	0.2715	0.3028
0	-0.0395	-0.0199	0.0199	0.0507	0.0819	0.1133	0.1446	0.1760	0.2074	0.2389	0.2703	0.3017
0.2	-0.0761	-0.0583	0.0000	0.0405	0.0761	0.1092	0.1416	0.1736	0.2054	0.2371	0.2687	0.3003
0.4	-0.1081	-0.0927	-0.0199	0.0000	0.0607	0.1014	0.1365	0.1699	0.2025	0.2347	0.2667	0.2986
0.6	-0.1349	-0.1221	-0.0395	-0.0405	0.0000	0.0810	0.1268	0.1638	0.1982	0.2314	0.2641	0.2963
0.8	-0.1571	-0.1466	-0.0583	-0.0507	-0.0607	0.0000	0.1012	0.1521	0.1912	0.2265	0.2604	0.2934
1	-0.1752	-0.1666	-0.0761	-0.0546	-0.0761	-0.0810	0.0000	0.1215	0.1775	0.2185	0.2548	0.2893
1.2	-0.1901	-0.1830	-0.0927	-0.0566	-0.0819	-0.1014	-0.1012	0.0000	0.1417	0.2029	0.2458	0.2832
1.4	-0.2024	-0.1966	-0.1081	-0.0579	-0.0849	-0.1092	-0.1268	-0.1215	0.0000	0.1620	0.2282	0.2731
1.6	-0.2127	-0.2078	-0.1221	-0.0587	-0.0868	-0.1133	-0.1365	-0.1521	-0.1417	0.0000	0.1822	0.2536
1.8	-0.2214	-0.2173	-0.1349	-0.0593	-0.0880	-0.1157	-0.1416	-0.1638	-0.1775	-0.1620	0.0000	0.2024
2	-0.2288	-0.2253	-0.1466	-0.0597	-0.0889	-0.1174	-0.1446	-0.1699	-0.1912	-0.2029	-0.1822	0.0000
2.2	-0.2352	-0.2321	-0.1571	-0.0601	-0.0896	-0.1185	-0.1467	-0.1736	-0.1982	-0.2185	-0.2282	-0.2024
2.4	-0.2407	-0.2381	-0.1666	-0.0603	-0.0901	-0.1194	-0.1482	-0.1760	-0.2025	-0.2265	-0.2458	-0.2536
2.6	-0.2456	-0.2432	-0.1752	-0.0606	-0.0905	-0.1201	-0.1493	-0.1778	-0.2054	-0.2314	-0.2548	-0.2731
2.8	-0.2498	-0.2477	-0.1830	-0.0608	-0.0908	-0.1207	-0.1501	-0.1791	-0.2074	-0.2347	-0.2604	-0.2832
3	-0.2536	-0.2518	-0.1901	-0.0609	-0.0911	-0.1211	-0.1508	-0.1802	-0.2090	-0.2371	-0.2641	-0.2893
3.2	-0.2569	-0.2553	-0.1966	-0.0610	-0.0914	-0.1215	-0.1514	-0.1810	-0.2102	-0.2389	-0.2667	-0.2934
3.4	-0.2600	-0.2585	-0.2024	-0.0612	-0.0916	-0.1218	-0.1519	-0.1817	-0.2112	-0.2402	-0.2687	-0.2963
3.6	-0.2627	-0.2614	-0.2078	-0.0613	-0.0917	-0.1221	-0.1523	-0.1823	-0.2120	-0.2413	-0.2703	-0.2986
3.8	-0.2652	-0.2640	-0.2127	-0.0614	-0.0919	-0.1223	-0.1526	-0.1827	-0.2126	-0.2422	-0.2715	-0.3003
4	-0.2674	-0.2663	-0.2173	-0.0614	-0.0920	-0.1225	-0.1529	-0.1831	-0.2132	-0.2430	-0.2725	-0.3017
6	-0.2822	-0.2817	-0.2477	-0.0619	-0.0929	-0.1237	-0.1546	-0.1854	-0.2161	-0.2468	-0.2774	-0.3079


      </tableData>
  </table>

   <!-- power coefficient as a function of advance ratio and blade angle -->
  <table name="C_POWER" type="internal">
     <tableData>
	  <!--
               -10        0        15        25        35        45        55        65       90
      -0.2      0.0120   0.0239    0.0838    0.1902    0.3280    0.4666    0.5384    0.5958   0.5958
       0.0      0.0479   0.0120    0.0718    0.1773    0.3137    0.4666    0.5405    0.5958   0.5958
       0.2      0.0682   0.0192    0.0694    0.1651    0.3000    0.4666    0.5405    0.5958   0.5958
       0.4      0.0919   0.0418    0.0598    0.1522    0.2850    0.4666    0.5405    0.5958   0.5958
       0.6      0.1127   0.0634    0.0395    0.1414    0.2670    0.4573    0.5384    0.5958   0.5958
       0.8      0.1328   0.0849    0.0120    0.1199    0.2512    0.4364    0.5384    0.5958   0.5958
       1.0      0.1529   0.1055    0.0120    0.0840    0.2369    0.4142    0.5362    0.5958   0.5958
       1.2      0.1737   0.0843   -0.0395    0.0323    0.2096    0.3970    0.5326    0.5958   0.5958
       1.4      0.1938   0.1457   -0.0596   -0.0239    0.1615    0.3912    0.5262    0.5958   0.5958
       1.6      0.2139   0.1665   -0.0696   -0.0718    0.1019    0.3804    0.5147    0.5743   0.5958
       1.8      0.2347   0.1866   -0.0718   -0.1199    0.0299    0.3374    0.4989    0.5621   0.5958
       2.0      0.2548   0.2067   -0.0919   -0.1673   -0.0359    0.2871    0.4752    0.5506   0.5958
       2.2      0.2749   0.2275   -0.1127   -0.2153   -0.1077    0.2333    0.4608    0.5262   0.5958
       2.4      0.2957   0.2476   -0.1328   -0.2634   -0.1795    0.1665    0.4472    0.5147   0.5958
       2.6      0.3158   0.2677   -0.1529   -0.3108   -0.2275    0.0696    0.4364    0.4967   0.5958
       2.8      0.3359   0.2886   -0.1737   -0.3589   -0.2728   -0.0237    0.4271    0.4903   0.5958
       3.0      0.3568   0.3087   -0.1938   -0.4070   -0.3230   -0.1077    0.4127    0.4903   0.5958
       3.2      0.3769   0.3288   -0.2139   -0.4544   -0.3711   -0.1917    0.3862    0.4788   0.5958
       3.4      0.3970   0.3496   -0.2347   -0.5025   -0.4185   -0.2749    0.2993    0.4666   0.5958
       3.6      0.4178   0.3697   -0.2548   -0.5506   -0.4666   -0.3589    0.2103    0.4544   0.5958
       3.8      0.4379   0.3898   -0.2749   -0.5958   -0.5147   -0.4429    0.1170    0.4400   0.5958
       4.0      0.4580   0.4106   -0.2957   -0.5958   -0.5958   -0.5262    0.0237    0.4070   0.5958
       6.0      0.5958   0.5958   -0.5958   -0.5958   -0.5958   -0.5958   -0.5958   -0.3589   0.5958

     -->
       <!-- -->
	-16	0	8	16	24	32	40	48	56	64	72	80
-0.2	0.0375	0.0000	0.0000	0.1219	0.1841	0.2157	0.2472	0.2787	0.3102	0.3417	0.3732	0.4046
0	0.1123	0.0899	0.0600	0.1203	0.1828	0.2147	0.2465	0.2781	0.3097	0.3413	0.3728	0.4043
0.2	0.1865	0.1791	0.1197	0.1168	0.1805	0.2132	0.2454	0.2773	0.3090	0.3407	0.3723	0.4038
0.4	0.2599	0.2671	0.1791	0.0999	0.1752	0.2106	0.2437	0.2761	0.3081	0.3399	0.3717	0.4033
0.6	0.3320	0.3533	0.2380	-0.0999	0.1499	0.2044	0.2407	0.2742	0.3068	0.3389	0.3708	0.4026
0.8	0.4025	0.4372	0.2961	-0.1168	-0.1499	0.1749	0.2336	0.2708	0.3046	0.3374	0.3697	0.4017
1	0.4713	0.5183	0.3533	-0.1203	-0.1752	-0.1749	0.1998	0.2628	0.3008	0.3351	0.3681	0.4005
1.2	0.5382	0.5964	0.4095	-0.1219	-0.1805	-0.2044	-0.1998	0.2248	0.2920	0.3309	0.3656	0.3988
1.4	0.6028	0.6713	0.4646	-0.1227	-0.1828	-0.2106	-0.2336	-0.2248	0.2498	0.3212	0.3610	0.3960
1.6	0.6652	0.7427	0.5183	-0.1232	-0.1841	-0.2132	-0.2407	-0.2628	-0.2498	0.2748	0.3504	0.3911
1.8	0.7252	0.8106	0.5708	-0.1236	-0.1849	-0.2147	-0.2437	-0.2708	-0.2920	-0.2748	0.2998	0.3796
2	0.7828	0.8751	0.6218	-0.1239	-0.1854	-0.2157	-0.2454	-0.2742	-0.3008	-0.3212	-0.2998	0.3248
2.2	0.8379	0.9360	0.6713	-0.1241	-0.1858	-0.2163	-0.2465	-0.2761	-0.3046	-0.3309	-0.3504	-0.3248
2.4	0.8906	0.9936	0.7193	-0.1243	-0.1861	-0.2168	-0.2472	-0.2773	-0.3068	-0.3351	-0.3610	-0.3796
2.6	0.9410	1.0480	0.7657	-0.1244	-0.1864	-0.2172	-0.2478	-0.2781	-0.3081	-0.3374	-0.3656	-0.3911
2.8	0.9890	1.0992	0.8106	-0.1245	-0.1866	-0.2175	-0.2482	-0.2787	-0.3090	-0.3389	-0.3681	-0.3960
3	1.0347	1.1475	0.8540	-0.1246	-0.1868	-0.2177	-0.2485	-0.2792	-0.3097	-0.3399	-0.3697	-0.3988
3.2	1.0782	1.1929	0.8958	-0.1247	-0.1869	-0.2179	-0.2488	-0.2796	-0.3102	-0.3407	-0.3708	-0.4005
3.4	1.1197	1.2358	0.9360	-0.1247	-0.1870	-0.2180	-0.2490	-0.2799	-0.3107	-0.3413	-0.3717	-0.4017
3.6	1.1591	1.2761	0.9748	-0.1248	-0.1871	-0.2182	-0.2492	-0.2801	-0.3110	-0.3417	-0.3723	-0.4026
3.8	1.1966	1.3141	1.0121	-0.1249	-0.1872	-0.2183	-0.2494	-0.2803	-0.3113	-0.3421	-0.3728	-0.4033
4	1.2323	1.3499	1.0480	-0.1249	-0.1873	-0.2184	-0.2495	-0.2805	-0.3115	-0.3424	-0.3732	-0.4038
6	1.5076	1.6162	1.3382	-0.1252	-0.1877	-0.2190	-0.2502	-0.2815	-0.3127	-0.3439	-0.3750	-0.4062

     </tableData>
  </table>


<!-- thrust effects of helical tip Mach -->
<table name="CT_MACH" type="internal">
  <tableData>
    0.85   1.0
    1.05   0.8
  </tableData>
</table>

<!-- power-required effects of helical tip Mach -->
<table name="CP_MACH" type="internal">
  <tableData>
    0.85   1.0
    1.05   1.8
    2.00   1.4
  </tableData>
</table>

</propeller>
